**
** ABAQUS Input Deck Generated by HyperMesh Version  : 11.0.0.39
** Generated using HyperMesh-Abaqus Template Version : 11.0.0.39
**
**   Template:  ABAQUS/STANDARD 3D
**
*NODE
         1,  0.0            ,  0.21793        ,  0.1412623611111
         2,  0.0            ,  0.00779        ,  -0.014155
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**HWCOLOR COMP          1     6
*ELEMENT,TYPE=T3D2,ELSET=segment1, LAMINATE=segment1
         1,         5,         6
         2,         7,         8
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**HWCOLOR COMP          3    18
*ELEMENT,TYPE=T3D2,ELSET=segment3, LAMINATE=segment3
        10,        28,        27
        11,        26,        25
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**HWCOLOR COMP          4     8
*ELEMENT,TYPE=T3D2,ELSET=segment4, LAMINATE=segment4
        24,         3,         4
        25,         4,        29
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**HWCOLOR COMP          5     4
*ELEMENT,TYPE=T3D2,ELSET=segment5, , LAMINATE=segment4
        45,        50,        51
        46,        51,        52
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**HWCOLOR COMP          6    31
*ELEMENT,TYPE=T3D2,ELSET=web1, LAMINATE=web1
        73,        79,        80
        74,        80,        81
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**HWCOLOR COMP          7    39
*ELEMENT,TYPE=T3D2,ELSET=web2, LAMINATE=web2
        83,        90,        91
        84,        91,        92
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*****
*********************************************************
**
**                  MATERIALES
**
** Densidad de SNLTRIAX modificada de 1850 a 1.5x por 5mm de Resina Interior Extra
*********************************************************
*MATERIAL, NAME=unidirFRP
*ELASTIC, TYPE=TRISOTROPIC
	37.0E9,   9.0E9,  4.0E9,  4.0E9,  0.28, 1860
**
*MATERIAL, NAME=SAERTEX
*ELASTIC, TYPE=TRISOTROPIC
	13.6,   13.3E9,  11.8E9,  14.00E9,  0.51, 1780
**
*MATERIAL, NAME=SNLTRIAX
*ELASTIC, TYPE=TRISOTROPIC
	27.7E9,  13.65E9,  7.2E9,  9.00E9,  0.39, 2775
**
*********************************************************
**
**                  LAMINADOS
**
*********************************************************
*LAMINATE, NAME=LEPanel
	0          0            0
	0.005      0.000001     0.005
	3          1            3
*LAMINATE, NAME=TEPanel
	0          0            0
	0.005      0.000001     0.005
	3          1            3
*LAMINATE, NAME=TEReinf
	0          0            0
	0.005      0.004         0.005
	3          1            3
*LAMINATE, NAME=SparCap
	0          0            0
	0.005      0.068        0.005
	3          1            3
*LAMINATE, NAME=ShearWebs
	0          0            0
	0.005      0.006        0.005
	3          2            3
*END
