*NODE
         1,  0.0000000000000,  0.0000000000000,  0.0
         2,  1.570731731182 ,  0.0123367518334,  0.0
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*ELEMENT,TYPE=T3D2,ELSET=pendulo
1,1,2  , 52
2,2,3  , 52
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**-------------------------------------------------------------------------
**                      S E C C I O N E S
**-------------------------------------------------------------------------
**
*GRAL SECTION, NAME=cajoniso1x1x01,  LAW=NONLINEAR, ELSET=pendulo
**
**-------------------------------------------------------------------------
**                      A N A L I S I S
**-------------------------------------------------------------------------
*STEP, NAME=caidalibre, TYPE=STATIC, NLGEOM=YES
0, 4, 0.025
*BOUNDARY, TYPE=DISP
 1,  1, 6,  0
*END
